# a) Bestem vha. bilineær transformation (substitution) den ækvivalente overføringsfunktion H(z)
H(s) := (s + ω_1)/(s + ω_2)  # error: This variable is undefined. Check that the label is set correctly.
H(z) := H(2/T*(1 - z^-1)/(1 + z^-1)) simplify → (2*z + ω_1*T + ω_1*T*z - 2)/(2*z + ω_2*T + ω_2*T*z - 2)
# b) Udregn henholdsvis b og a koefficienterne for H(z). Sampletiden Ts sættes til 1 ms (T_s == 1*10^-3), ω_1 == 565 og ω_2 == 952.
H(z) := H(z) substitute, ω_1 == 565, ω_2 == 942, T == 1*10^-3 → (2565*z - 1435)/(2942*z - 1058)
(2565*z - 1435)/(2942*z - 1058) == (2565 - 1435*z^-1)/(2942 - 1058*z^-1)
# Det siger mathcad også:
(2565 - 1435*z^-1)/(2942 - 1058*z^-1) simplify → 5*(513*z - 287)/(2*(1471*z - 529))
5*(513*z - 287)/(2*(1471*z - 529)) → (2565*z - 1435)/(2942*z - 1058)
# Derudfra kan vi se at:
a := [2942, -1058]
b := [2565, -1435]
# d) Er H(z) filteret stabilt? Hvorfor/hvorfor ikke.
# Da den reele del er under nul, er den stabil.
2942 - 1058*z^-1 == 0 solve, z → 529/1471
# Sammenligning med den reele pol:
s + 952 solve, s → -952  # dvs.
e^(-952*1*10^-3) = 0.385968  # appx. =
529/1471 = 0.359619
# e) Find differensligningen der repræsenterer H(z), altså y(n) = …
H(z) == Y(z)/X(z)
Y(z)/X(z) == (2565 - 1435*z^-1)/(2942 - 1058*z^-1)
Y(z)*(2942 - 1058*z^-1) == X(z)*(2565 - 1435*z^-1)
Y(z)*2942 + Y(z)*(-1058)*z^-1 == X(z)*2565 + X(z)*(-1435)*z^-1
Y(z) + Y(z)*(-1058/2942)*z^-1 == X(z)*2565/2942 + X(z)*(-1435/2942)*z^-1
Y(z) == Y(z)*1058/2942*z^-1 + X(z)*2565/2942 + X(z)*(-1435/2942)*z^-1
y(n) == y(n - 1)*1058/2942 + x(n)*2565/2942 + x(n - 1)*(-1435/2942)
